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/batch
! ANSYS input file written by Workbench version 2020 R1
! File used for geometry attach: C:\Users\Owner\AppData\Local\Temp\WB_DESKTOP-SDVPC46_Walther Wennholz_23228_2\unsaved_project_files\dp0\SYS\DM\SYS.scdoc
/title,unsaved_project--Static Structural
/com,--- Data in consistent BIN units. See Solving Units in the help system for more information.
/units,BIN
/prep7
! Turn off shape checking because checks already performed inside WB mesher.
! See help system for more information.
SHPP,OFF,,NOWARN
etcon,set             ! allow ANSYS to choose best KEYOP's for 180x elements
/com,*********** Nodes for the whole assembly ***********
nblock,3,,11885
(1i9,3e20.9e3)
        1    -1.486373253E+01    -1.266319834E+01     1.860812557E+01
        2    -1.870244196E+01    -1.796290252E+00     8.850640211E-01
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-1
/com,*********** Elements for Body 1 "SYS\Body" ***********
et,1,187
eblock,19,solid,,562
(19i9)
        1        1        1        1        0        0        0        0       10        0        1      360      396      603      604     4908     5127     4917     4918
     5128     6228
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-1
et,2,186
keyo,2,2,1          ! set full integration on SOLID186
eblock,19,solid,,2517
(19i9)
        1        2        1        1        0        0        0        0       20        0      563      738     1201      814      816     2173     2197     2119     2081
     6890     7177     7175     6887    10146    10081    10003    10004     6891     8166     7178     7185
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-1
/com,*********** Send User Defined Coordinate System(s) ***********
csys,0
toffst,459.67,  ! Temperature offset from absolute zero
/com,*********** Set Reference Temperature ***********
tref,71.6
/com,*********** Send Materials ***********
Temperature = 'TEMP' ! Temperature
MP,DENS,1,0.000734544492879577,	! slinch in^-3
MP,ALPX,1,6.66666666666667e-06,	! F^-1
MP,C,1,373722.969668162,	! in^2 s^-2 F^-1
MP,KXX,1,7.55607836445752,	! slinch in s^-3 F^-1
MP,RSVX,1,8.52348993288591,	! ohm cmil in^-1
MP,EX,1,29007547.5428236,	! slinch s^-2 in^-1
MP,NUXY,1,0.3,
MP,MURX,1,10000,

!************************* Model Summary ********************
!SYS\Body,	Structural Steel,	matid,	1
!************************* End Model Summary ********************
/com,*********** Send Named Selection as Element Component ***********
esel,s,type,,1
esel,a,type,,2
cm,ELEMENT,elem
esel,all
/com,*********** Send Named Selection as Node Component ***********
CMBLOCK,EDGE_CLOSEST,NODE,       85
(8i10)
      1534      1908      1909      1910      1911      1913      1915      1916
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/com,*********** Send Named Selection as Node Component ***********
CMBLOCK,EDGE_PLANE_1,NODE,       53
(8i10)
      1534      1546      1547      1555      1567      1571      1572      1576
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/com,*********** Send Named Selection as Node Component ***********
CMBLOCK,EDGE_PLANE_2,NODE,       59
(8i10)
      1534      1537      1539      1540      1544      1550      1551      1552
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/com,*********** Send Named Selection as Node Component ***********
CMBLOCK,EDGE_PLANE_FAR,NODE,       65
(8i10)
      1535      1536      1538      1541      1542      1543      1545      1548
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/com,*********** Send Named Selection as Node Component ***********
CMBLOCK,EDGE_FAR_1,NODE,       77
(8i10)
      1619      1912      1914      1917      1918      1919      1922      1923
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/com,*********** Send Named Selection as Node Component ***********
CMBLOCK,EDGE_FAR_2,NODE,       65
(8i10)
      1535      1536      1538      1541      1542      1543      1545      1548
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/com,*********** Define Force Using Surface Effect Elements ***********
local,12,0,0.,0.,0.,0.,0.,0.
csys,0
et,3,156
keyop,3,5,1         !  No orientation node
eblock,10,,,39
(15i9)
     4324        3        3        3       12     2559     1986     9728
     4325        3        3        3       12     2528     2527    10776
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-1
esel,s,type,,3
keyop,3,2,1                ! Apply load in local coordinate system
keyop,3,7,1                ! Use original area so load is constant in large deformation
esel,all
/com,*********** Define Force Using Surface Effect Elements ***********
local,13,0,0.,0.,0.,0.,0.,0.
csys,0
et,4,156
keyop,4,5,1         !  No orientation node
eblock,10,,,32
(15i9)
     4363        4        4        4       13     1563     1564     8865
     4364        4        4        4       13     1570     1599     8880
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-1
esel,s,type,,4
keyop,4,2,1                ! Apply load in local coordinate system
keyop,4,7,1                ! Use original area so load is constant in large deformation
esel,all
/com,*********** Define Force Using Surface Effect Elements ***********
local,14,0,0.,0.,0.,0.,0.,0.
csys,0
et,5,156
keyop,5,5,1         !  No orientation node
eblock,10,,,38
(15i9)
     4395        5        5        5       14     1986     1984     9724
     4396        5        5        5       14     1937     1936     9636
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-1
esel,s,type,,5
keyop,5,2,1                ! Apply load in local coordinate system
keyop,5,7,1                ! Use original area so load is constant in large deformation
esel,all
/com,*********** Define Force Using Surface Effect Elements ***********
local,15,0,0.,0.,0.,0.,0.,0.
csys,0
et,6,156
keyop,6,5,1         !  No orientation node
eblock,10,,,42
(15i9)
     4433        6        6        6       15     1986     1985     9726
     4434        6        6        6       15     1927     1934     9618
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-1
esel,s,type,,6
keyop,6,2,1                ! Apply load in local coordinate system
keyop,6,7,1                ! Use original area so load is constant in large deformation
esel,all
/com,*********** Define Force Using Surface Effect Elements ***********
local,16,0,0.,0.,0.,0.,0.,0.
csys,0
et,7,156
keyop,7,5,1         !  No orientation node
eblock,10,,,26
(15i9)
     4475        7        7        7       16     1597     1598     8932
     4476        7        7        7       16     1610     1586     8913
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-1
esel,s,type,,7
keyop,7,2,1                ! Apply load in local coordinate system
keyop,7,7,1                ! Use original area so load is constant in large deformation
esel,all
/com,*********** Define Force Using Surface Effect Elements ***********
local,17,0,0.,0.,0.,0.,0.,0.
csys,0
et,8,156
keyop,8,5,1         !  No orientation node
eblock,10,,,29
(15i9)
     4501        8        8        8       17     1602     1565     8870
     4502        8        8        8       17     1575     1562     8862
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-1
esel,s,type,,8
keyop,8,2,1                ! Apply load in local coordinate system
keyop,8,7,1                ! Use original area so load is constant in large deformation
esel,all
fini
/com,****************************************************************************
/com,*************************    SOLUTION       ********************************
/com,****************************************************************************
/solu
antype,0                   ! static analysis
nlgeom,on                  ! Turn on Large Deformation Effects
_thickRatio=  1     ! Ratio of thick parts in the model
eqsl,pcg,1e-8,,,,,,1
cntr,print,1               ! print out contact info and also make no initial contact an error
nldiag,cont,iter           ! print out contact info each equilibrium iteration
rescontrol,define,last,last,,dele	   ! Program Controlled
/com,****************************************************
/com,******************* SOLVE FOR LS 1 OF 1 ****************
esel,s,type,,3
nsle
sfe,all,1,pres,1,-363.17872321934
sfe,all,2,pres,1,-515.274633384711
sfe,all,3,pres,1,-504.809848466069
esel,s,type,,4
nsle
sfe,all,1,pres,1,-47.894922613378
sfe,all,2,pres,1,-1071.08661883487
sfe,all,3,pres,1,-126.158971328041
esel,s,type,,5
nsle
sfe,all,1,pres,1,-557.124781514947
sfe,all,2,pres,1,147.987646602015
sfe,all,3,pres,1,-34.4505636380632
esel,s,type,,6
nsle
sfe,all,1,pres,1,-304.126741563222
sfe,all,2,pres,1,150.691430867594
sfe,all,3,pres,1,114.989703631306
esel,s,type,,7
nsle
sfe,all,1,pres,1,387.895626256976
sfe,all,2,pres,1,223.721247284653
sfe,all,3,pres,1,76.3760786486667
esel,s,type,,8
nsle
sfe,all,1,pres,1,49.7173156179233
sfe,all,2,pres,1,321.204820563423
sfe,all,3,pres,1,157.073389388313
nsel,all
esel,all
acel,-344282.0755579,326439.457940214,323183.226606641
/com,*** Set Displacements ***
CMBLOCK,_CM473UX_XP,NODE,       77
(8i10)
      1619      1912      1914      1917      1918      1919      1922      1923
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cmsel,s,_CM473UX_XP
d,all,ux,-4.50866450339344e-003
CMBLOCK,_CM473UY_YP,NODE,       77
(8i10)
      1619      1912      1914      1917      1918      1919      1922      1923
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cmsel,s,_CM473UY_YP
d,all,uy,-9.0546522872439e-003
CMBLOCK,_CM473UZ_ZP,NODE,       77
(8i10)
      1619      1912      1914      1917      1918      1919      1922      1923
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cmsel,s,_CM473UZ_ZP
d,all,uz,1.17533708218818e-002
CMBLOCK,_CM475UX_XP,NODE,       53
(8i10)
      1534      1546      1547      1555      1567      1571      1572      1576
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cmsel,s,_CM475UX_XP
d,all,ux,9.41868749173988e-003
CMBLOCK,_CM475UY_YP,NODE,       53
(8i10)
      1534      1546      1547      1555      1567      1571      1572      1576
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cmsel,s,_CM475UY_YP
d,all,uy,-8.7852600711179e-004
CMBLOCK,_CM475UZ_ZP,NODE,       53
(8i10)
      1534      1546      1547      1555      1567      1571      1572      1576
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cmsel,s,_CM475UZ_ZP
d,all,uz,2.34008750796954e-002
nsel,all

/com,*** Component For All Non-Zero UX Displacements ***
cmsel,s,_CM473ux_xp
cmsel,a,_CM475ux_xp
cm,_DISPNONZEROUX,NODE
nsel,all


/com,*** Component For All Non-Zero UY Displacements ***
cmsel,s,_CM473uy_yp
cmsel,a,_CM475uy_yp
cm,_DISPNONZEROUY,NODE
nsel,all


/com,*** Component For All Non-Zero UZ Displacements ***
cmsel,s,_CM473uz_zp
cmsel,a,_CM475uz_zp
cm,_DISPNONZEROUZ,NODE
nsel,all

autots,on                  ! Workbench Program Controlled automatic time stepping
nsub,1,10,1                ! due to presence of general nonlinear
time,1.
outres,erase
outres,all,none
outres,nsol,last,
outres,rsol,last
outres,eangl,last
outres,etmp,last
outres,veng,last
outres,strs,last,
outres,epel,last,
outres,eppl,last,
outres,cont,last,
! *********** WB SOLVE COMMAND ***********
! check interactive state
*get,ANSINTER_,active,,int
*if,ANSINTER_,ne,0,then
/eof
*endif
solve
/com *************** Write FE CONNECTORS *********
CEWRITE,file,ce,,INTE
/com,****************************************************
/com,*************** FINISHED SOLVE FOR LS 1 *************
*get,_PCGITER,active,,solu,cgiter
/post1
fini
