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/batch
! ANSYS input file written by Workbench version 2020 R1
! File used for geometry attach: C:\Users\Owner\AppData\Local\Temp\WB_DESKTOP-SDVPC46_Walther Wennholz_6748_2\unsaved_project_files\dp0\SYS\DM\SYS.scdoc
/title,working_nodal_displacement--Static Structural
/com,--- Data in consistent MKS units. See Solving Units in the help system for more information.
/units,MKS
/prep7
! Turn off shape checking because checks already performed inside WB mesher.
! See help system for more information.
SHPP,OFF,,NOWARN
etcon,set             ! allow ANSYS to choose best KEYOP's for 180x elements
/com,*********** Nodes for the whole assembly ***********
nblock,3,,13279
(1i9,3e20.9e3)
        1     3.241299322E-01    -5.011293911E-01    -3.323944406E-01
        2     3.980014265E-01    -8.498640210E-01    -6.641985411E-01
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-1
/com,*********** Elements for Body 1 "SYS\Surface" ***********
et,1,187
eblock,19,solid,,476
(19i9)
        1        1        1        1        0        0        0        0       10        0        1      249     1021     1023      252     4423     7781     4424     4418
     4446     4447
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-1
et,2,186
keyo,2,2,1          ! set full integration on SOLID186
eblock,19,solid,,2810
(19i9)
        1        2        1        1        0        0        0        0       20        0      477      483      506      504      484      992     1093     1088      994
     5495     5580     5500     5494     7694     7995     7700     7693     5498     5587     5582     5502
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-1
/com,*********** Send User Defined Coordinate System(s) ***********
local,12,0,1.07930262705004,-0.727534967228298,-0.25807823956551,0.,0.,0.
local,13,0,0.868075740097088,-0.668897436762212,-0.254499625672111,0.,0.,0.
local,14,0,0.761638937736552,-0.607400356630363,-0.23599511568361,0.,0.,0.
local,15,0,0.531997895466443,-0.597524942312749,-0.22400648060997,0.,0.,0.
local,16,0,0.261974125874879,-0.52893911637117,-0.206804109460673,0.,0.,0.
local,17,0,0.81408081897995,-0.633465573950336,-0.297610325330262,0.,0.,0.
local,18,0,0.495866429093915,-0.612961759933657,-0.290114499678802,0.,0.,0.
local,19,0,0.182351250407934,-0.580757746799029,-0.277530310646816,0.,0.,0.
local,20,0,7.52323727100611e-002,-0.552201314660088,-0.262232670749447,0.,0.,0.
local,21,0,-0.158488367519554,-0.509905598353366,-0.241331001604113,0.,0.,0.
local,22,0,0.113352400653571,-7.8643048938154e-003,-5.46458286553105e-002,0.,0.,0.
local,23,0,0.272333990919071,-0.122025026320319,-0.107731762273071,0.,0.,0.
local,24,0,0.440350089594198,-0.205213511149922,-0.13799063397311,0.,0.,0.
local,25,0,0.616941655857128,-0.376895987699798,-0.185976728379945,0.,0.,0.
local,26,0,0.675285283624082,-0.642285140560261,-0.227710244816162,0.,0.,0.
local,27,0,0.613694960256152,-1.41269673466293,-0.903388493574871,0.,0.,0.
local,28,0,0.510318608339966,-1.21797123785252,-0.711108828881833,0.,0.,0.
local,29,0,0.378812113614242,-1.19848898094966,-0.496746825701269,0.,0.,0.
local,30,0,0.287924793493967,-1.17855771372436,-0.447250485183755,0.,0.,0.
local,31,0,0.268414228028418,-0.979278822406042,-0.36801600769376,0.,0.,0.
csys,0
toffst,273.15,  ! Temperature offset from absolute zero
/com,*********** Set Reference Temperature ***********
tref,22.
/com,*********** Send Materials ***********
Temperature = 'TEMP' ! Temperature
MP,DENS,1,7850,	! kg m^-3
MP,ALPX,1,1.2e-05,	! C^-1
MP,C,1,434,	! J kg^-1 C^-1
MP,KXX,1,60.5,	! W m^-1 C^-1
MP,RSVX,1,1.7e-07,	! kg m^3 A^-2 s^-3
MP,EX,1,200000000000,	! Pa
MP,NUXY,1,0.3,
MP,MURX,1,10000,

!************************* Model Summary ********************
!SYS\Surface,	Structural Steel,	matid,	1
!************************* End Model Summary ********************
CMBLOCK,SELECTION,NODE,      807
(8i10)
       111       112       133       138       149       150       154       223
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CMBLOCK,SELECTION_2,NODE,      932
(8i10)
       110       114       116       121       123       128       139       156
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CMBLOCK,SELECTION_3,NODE,      113
(8i10)
       115       127       129       159       180       193       243       367
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CMBLOCK,SELECTION_4,NODE,      189
(8i10)
       180       187       193       212       215       218       277       347
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CMBLOCK,SELECTION_5,NODE,      230
(8i10)
       132       186       194       244       256       287       298       305
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CMBLOCK,SELECTION_6,NODE,      723
(8i10)
       126       140       153       166       183       189       196       197
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CMBLOCK,SELECTION_7,NODE,       72
(8i10)
       126       299       368       519      1231      1239      1249      1250
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CMBLOCK,SELECTION_20,NODE,      192
(8i10)
        15        18        20        23        25        28        30        33
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
/com,*********** Create Direct FE , Displacements ****
CMBLOCK,_CM98U  ,NODE,      807
(8i10)
       111       112       133       138       149       150       154       223
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CMBLOCK,_CM100U ,NODE,      932
(8i10)
       110       114       116       121       123       128       139       156
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CMBLOCK,_CM102U ,NODE,      113
(8i10)
       115       127       129       159       180       193       243       367
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CMBLOCK,_CM104U ,NODE,      189
(8i10)
       180       187       193       212       215       218       277       347
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CMBLOCK,_CM106U ,NODE,      230
(8i10)
       132       186       194       244       256       287       298       305
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CMBLOCK,_CM108U ,NODE,      723
(8i10)
       126       140       153       166       183       189       196       197
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CMBLOCK,_CM110U ,NODE,       72
(8i10)
       126       299       368       519      1231      1239      1249      1250
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
CMBLOCK,_CM112U ,NODE,       41
(8i10)
      1317      1411      1462      1471      2314      2315      2344      2407
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CMBLOCK,_CM114U ,NODE,        2
(8i10)
     11348     11350
CMBLOCK,_CM116U ,NODE,      128
(8i10)
      1033      1314      1326      1330      1335      1340      1368      1829
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
/com,*********** Create Direct FE , Forces ****
CMBLOCK,_CM147F ,NODE,      502
(8i10)
       285       288       586       589       610       621       635       647
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CMBLOCK,_CM149F ,NODE,      349
(8i10)
       546       557       574       577       641       651       851       854
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CMBLOCK,_CM151F ,NODE,       92
(8i10)
       826       828       840       842       867       869       986      2002
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CMBLOCK,_CM153F ,NODE,      670
(8i10)
       111       112       116       138       139       150       154       157
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CMBLOCK,_CM155F ,NODE,      154
(8i10)
       146       192       205       310       362       363       364       418
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CMBLOCK,_CM157F ,NODE,     1169
(8i10)
         2         5        38        40        45        47        48        49
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CMBLOCK,_CM159F ,NODE,      843
(8i10)
        15        20        23        25        28        30        31        33
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CMBLOCK,_CM161F ,NODE,        1
(8i10)
     12065
CMBLOCK,_CM163F ,NODE,        1
(8i10)
     11443
CMBLOCK,_CM165F ,NODE,      192
(8i10)
        15        18        20        23        25        28        30        33
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
fini
/com,****************************************************************************
/com,*************************    SOLUTION       ********************************
/com,****************************************************************************
/solu
antype,0                   ! static analysis
_thickRatio=  1     ! Ratio of thick parts in the model
eqsl,pcg,1e-8,,,,,,1
cntr,print,1               ! print out contact info and also make no initial contact an error
nldiag,cont,iter           ! print out contact info each equilibrium iteration
rescontrol,,none                 ! Do not keep any restart files
/com,****************************************************
/com,******************* SOLVE FOR LS 1 OF 1 ****************
/com,**** Set Direct FE , Displacements ****
d,_CM98U,ux,1.19343598106502e-003
d,_CM98U,uy,-1.56382252710597e-003
d,_CM98U,uz,1.16526417941797e-004
d,_CM100U,ux,8.12662669497521e-004
d,_CM100U,uy,-8.05683037837964e-004
d,_CM100U,uz,-3.19640186284616e-004
d,_CM102U,ux,-1.01704380468673e-004
d,_CM102U,uy,-5.79275737660865e-004
d,_CM102U,uz,9.71126593270284e-004
d,_CM104U,ux,1.12314163570913e-003
d,_CM104U,uy,2.77097977109268e-004
d,_CM104U,uz,2.18424893072993e-004
d,_CM106U,ux,-3.04319996751084e-004
d,_CM106U,uy,1.46831567157795e-005
d,_CM106U,uz,-1.03986486194646e-003
d,_CM108U,ux,-1.08649345103982e-003
d,_CM108U,uy,4.83720290514868e-004
d,_CM108U,uz,8.00161541613622e-004
d,_CM110U,ux,-9.83712892891192e-004
d,_CM110U,uy,1.39017039881251e-004
d,_CM110U,uz,1.15865434502069e-003
d,_CM112U,ux,-2.559573720791e-003
d,_CM112U,uy,1.12923978305311e-004
d,_CM112U,uz,3.9072322048827e-004
d,_CM114U,ux,4.33464802186638e-004
d,_CM114U,uy,1.75456108520828e-003
d,_CM114U,uz,-1.24039656919349e-003
d,_CM116U,ux,1.72383490651278e-003
d,_CM116U,uy,4.99024005137172e-004
d,_CM116U,uz,5.25889313790591e-004
/com,**** Set Direct FE , Forces ****
f,_CM147F,fx,8.01368581336361e-002
f,_CM147F,fy,-0.149627086188162
f,_CM147F,fz,0.153743807814003
f,_CM149F,fx,8.95550885879971e-003
f,_CM149F,fy,6.77588072999782e-002
f,_CM149F,fz,-0.101238648666936
f,_CM151F,fx,-1.33606328136983
f,_CM151F,fy,1.15243268695646e-002
f,_CM151F,fz,0.129443906746226
f,_CM153F,fx,-0.218910710760478
f,_CM153F,fy,0.132198310705494
f,_CM153F,fz,-0.178473563581024
f,_CM155F,fx,-3.35279541906213e-002
f,_CM155F,fy,0.352085726374734
f,_CM155F,fz,0.298386095086706
f,_CM157F,fx,-8.46551242422807e-002
f,_CM157F,fy,2.05892189012145e-002
f,_CM157F,fz,-8.05583409696813e-002
f,_CM159F,fx,3.56523298961051e-002
f,_CM159F,fy,-8.45359540484636e-002
f,_CM159F,fz,-2.67087857785107e-002
f,_CM161F,fx,-85.4704375828383
f,_CM161F,fy,75.7229060023625
f,_CM161F,fz,100.309546918015
f,_CM163F,fx,54.4301720701142
f,_CM163F,fy,109.693617517605
f,_CM163F,fz,-23.3653346581821
f,_CM165F,fx,-0.37977874329063
f,_CM165F,fy,0.210265454126899
f,_CM165F,fz,0.290340115586011
nsub,1,1,1
time,1.
outres,erase
outres,all,none
outres,nsol,last,
outres,rsol,last
outres,eangl,last
outres,etmp,last
outres,veng,last
outres,strs,last,
outres,epel,last,
outres,eppl,last,
outres,cont,last,
! *********** WB SOLVE COMMAND ***********
! check interactive state
*get,ANSINTER_,active,,int
*if,ANSINTER_,ne,0,then
/eof
*endif
solve
/com *************** Write FE CONNECTORS *********
CEWRITE,file,ce,,INTE
/com,****************************************************
/com,*************** FINISHED SOLVE FOR LS 1 *************
*get,_PCGITER,active,,solu,cgiter
/post1
fini
